*Heading
** Job name: composelector_panel2 Model name: MasterModel
** Generated by: Abaqus/CAE 6.12-3
** modified one incomplete nodeset
** loading modified: now imposed angle
** many unused node and element sets eliminated
*Preprint, echo=NO, model=NO, history=NO, contact=NO
**
** PARTS
**
*Part, name=FRM_ifr2
*Node
      1,           0.,        -1.25,  -1.29999995
      2,           0.,        -1.25,   24.3999996
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*Element, type=S4R
 1,   89,  963,   74,    1
 2,  963,  964,   73,   74
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*Element, type=S3R
2043, 6131, 5413, 5579
2044, 6288, 6244, 2730
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**
*Elset, elset=_Bottom_SNEG, internal
    1,    2,    3,    4,    5,    6
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*Surface, type=ELEMENT, name=Bottom
_Bottom_SNEG, SNEG
**
*Nset, nset=s_Set-1, internal
  15,  16,  27,  28,  57, 223
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*Nset, nset=s_Set-3, internal
   1,   2,  25,  26,  56,  71
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**
*Orientation, name=Ori-1, system=CYLINDRICAL
          0., -1997.83500000001, -1.29999999999998,           0., -1997.83500000001, -2.29999999999998
3, 90.
** Region: (CompositeLayup-1-1: Generated From Layup), (Controls:EC-1)
*Elset, elset=CompositeLayup-1-1, generate
    1,  6851,     1
** Section: CompositeLayup-1-1
*Shell Section, elset=CompositeLayup-1-1, composite, orientation=Ori-1, controls=EC-1, layup=CompositeLayup-1
0.18, 3, Composite-material, 45., Ply-1
0.18, 3, Composite-material, -45., Ply-2
0.18, 3, Composite-material, 0., Ply-3
0.18, 3, Composite-material, 0., Ply-4
0.18, 3, Composite-material, 90., Ply-5
0.18, 3, Composite-material, 0., Ply-6
0.18, 3, Composite-material, 0., Ply-7
0.18, 3, Composite-material, 45., Ply-8
0.18, 3, Composite-material, -45., Ply-9
0.18, 3, Composite-material, 0., Ply-10
0.18, 3, Composite-material, 0., Ply-11
0.18, 3, Composite-material, 90., Ply-12
0.18, 3, Composite-material, 0., Ply-13
0.18, 3, Composite-material, 0., Ply-14
0.18, 3, Composite-material, -45., Ply-15
0.18, 3, Composite-material, 45., Ply-16
*End Part
**
**
*Part, name=PNL_Panel
*Node
      1,   1948.34314,  -446.800018,        2520.
      2,   1948.34314,  -446.800018,           0.
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*Element, type=S4R
   1,    1,   29, 3733,  546
   2,   29,   30, 3734, 3733
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**
*Nset, nset=Set-7, internal
    1,    4,    6,    7,   10,   11
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*Nset, nset=Set-8, internal
    2,    3,    5,    8,    9,   12
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**
*Elset, elset=_Inside_SPOS, internal, generate
     1,  27216,      1
*Surface, type=ELEMENT, name=Inside
_Inside_SPOS, SPOS
*Elset, elset=_FP_STR_1_SPOS, internal, generate
 26461,  27216,      1
*Elset, elset=_FP_STR_2_SPOS, internal, generate
 24193,  24948,      1
*Elset, elset=_FP_STR_3_SPOS, internal, generate
 19657,  20412,      1
*Elset, elset=_FP_STR_4_SPOS, internal, generate
 15121,  15876,      1
*Elset, elset=_FP_STR_5_SPOS, internal, generate
 10585,  11340,      1
*Elset, elset=_FP_STR_6_SPOS, internal, generate
 6049,  6804,     1
**
*Nset, nset=s_Set-1, internal
   3,   4, 288, 289, 290, 291
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*Nset, nset=s_Set-3, internal
   27,   28, 3473, 3474, 3475, 3476
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**
*Orientation, name=Ori-2
          0.,           0.,           1.,           0.,           1.,           0.
3, 0.
** Region: (CompositeLayup-1-1: Generated From Layup), (Controls:EC-1)
*Elset, elset=CompositeLayup-1-1, generate
     1,  27216,      1
** Section: CompositeLayup-1-1
*Shell Section, elset=CompositeLayup-1-1, composite, orientation=Ori-2, controls=EC-1, layup=CompositeLayup-1
0.18, 3, Composite-material, -45., Ply-1
0.18, 3, Composite-material, 90., Ply-2
0.18, 3, Composite-material, 0., Ply-3
0.18, 3, Composite-material, 90., Ply-4
0.18, 3, Composite-material, 0., Ply-5
0.18, 3, Composite-material, 45., Ply-6
0.18, 3, Composite-material, 45., Ply-7
0.18, 3, Composite-material, 0., Ply-8
0.18, 3, Composite-material, 90., Ply-9
0.18, 3, Composite-material, 0., Ply-10
0.18, 3, Composite-material, 90., Ply-11
0.18, 3, Composite-material, -45., Ply-12
*End Part
**
*Part, name=STR_Z-stringer
*Node
      1,         -20.,        24.25,        2520.
      2,        -0.75,        24.25,        2520.
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*Element, type=S4R
  1,    1,    9, 1021,  512
  2,    9,    2,   10, 1021
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**
*Nset, nset=Set-7, internal
   1,   2,   5,   7,   9, 513, 766, 767
*Nset, nset=Set-8, internal
    3,    4,    6,    8,  261,  765, 1019, 1020
**
*Elset, elset=_Bottom_SNEG, internal, generate
 1009,  1764,     1
*Surface, type=ELEMENT, name=Bottom
_Bottom_SNEG, SNEG
**
*Orientation, name=Ori-2
          0.,           0.,           1.,           0.,           1.,           0.
3, 0.
** Region: (CompositeLayup-1-1: Generated From Layup), (Controls:EC-1)
*Elset, elset=CompositeLayup-1-1, generate
    1,  1764,     1
** Section: CompositeLayup-1-1
*Shell Section, elset=CompositeLayup-1-1, composite, orientation=Ori-2, controls=EC-1, layup=CompositeLayup-1
0.18, 3, Composite-material, -45., Ply-1
0.18, 3, Composite-material, 90., Ply-2
0.18, 3, Composite-material, 0., Ply-3
0.18, 3, Composite-material, 90., Ply-4
0.18, 3, Composite-material, 0., Ply-5
0.18, 3, Composite-material, 45., Ply-6
0.18, 3, Composite-material, 45., Ply-7
0.18, 3, Composite-material, 0., Ply-8
0.18, 3, Composite-material, 90., Ply-9
0.18, 3, Composite-material, 0., Ply-10
0.18, 3, Composite-material, 90., Ply-11
0.18, 3, Composite-material, -45., Ply-12
*End Part
**
**
** ASSEMBLY
**
*Assembly, name=Assembly
**
*Instance, name=Panel, part=PNL_Panel
*End Instance
**
*Instance, name=STR_1, part=STR_Z-stringer
1947.47257018818, 445.728505471273,           0.
1947.47257018818, 445.728505471273,           0., 1947.47257018818, 445.728505471273,           1., 103.289473179061
*End Instance
**
*Instance, name=STR_2, part=STR_Z-stringer
1979.65206015276, 268.888513994031,           0.
1979.65206015276, 268.888513994031,           0., 1979.65206015276, 268.888513994031,           1., 98.1328523057565
*End Instance
**
*Instance, name=STR_3, part=STR_Z-stringer
1995.80718925576, 89.8719953045052,           0.
1995.80718925576, 89.8719953045052,           0., 1995.80718925576, 89.8719953045052,           1., 92.9762342900257
*End Instance
**
*Instance, name=STR_4, part=STR_Z-stringer
1995.80718925576, -89.8719953045051,           0.
1995.80718925576, -89.8719953045051,           0., 1995.80718925576, -89.8719953045051,           1., 87.8196139017887
*End Instance
**
*Instance, name=STR_5, part=STR_Z-stringer
1979.65206015276, -268.888513994031,           0.
1979.65206015276, -268.888513994031,           0., 1979.65206015276, -268.888513994031,           1., 82.6629938971331
*End Instance
**
*Instance, name=STR_6, part=STR_Z-stringer
1947.47257018818, -445.728505471273,           0.
1947.47257018818, -445.728505471273,           0., 1947.47257018818, -445.728505471273,           1., 77.5063748552675
*End Instance
**
*Instance, name=FRM_1, part=FRM_ifr2
1925.45522874115, 532.885399817231,        2205.
1925.45522874115, 532.885399817231,        2205., 1925.45522874115, 532.885399817231,        2204., 74.5301391466045
*End Instance
**
*Instance, name=FRM_2, part=FRM_ifr2
1925.45522874115, 532.885399817231,        1575.
1925.45522874115, 532.885399817231,        1575., 1925.45522874115, 532.885399817231,        1574., 74.5301391466045
*End Instance
**
*Instance, name=FRM_3, part=FRM_ifr2
1925.45522874115, 532.885399817231,         945.
1925.45522874115, 532.885399817231,         945., 1925.45522874115, 532.885399817231,         944., 74.5301391466045
*End Instance
**
*Instance, name=FRM_4, part=FRM_ifr2
1925.45522874115, 532.885399817231,         315.
1925.45522874115, 532.885399817231,         315., 1925.45522874115, 532.885399817231,         314., 74.5301391466045
*End Instance
**
*Nset, nset=s_Set-1
Panel.s_Set-1
FRM_1.s_Set-1
FRM_2.s_Set-1
FRM_3.s_Set-1
FRM_4.s_Set-1
**
*Nset, nset=s_Set-3
Panel.s_Set-3
FRM_1.s_Set-3
FRM_2.s_Set-3
FRM_3.s_Set-3
FRM_4.s_Set-3
**
*Nset, nset=Set-7
Panel.Set-7
STR_1.Set-7
STR_2.Set-7
STR_3.Set-7
STR_4.Set-7
STR_5.Set-7
STR_6.Set-7
**
*Nset, nset=Set-8
Panel.Set-8
STR_1.Set-8
STR_2.Set-8
STR_3.Set-8
STR_4.Set-8
STR_5.Set-8
STR_6.Set-8
**
*Surface, type=ELEMENT, name=Panel_To_STR&Tie
Panel._FP_STR_1_SPOS, SPOS
Panel._FP_STR_2_SPOS, SPOS
Panel._FP_STR_3_SPOS, SPOS
Panel._FP_STR_4_SPOS, SPOS
Panel._FP_STR_5_SPOS, SPOS
Panel._FP_STR_6_SPOS, SPOS
**
** Constraint: TIE_FRM@Panel@P
*Tie, name=TIE_FRM@Panel@P, adjust=yes, type=SURFACE TO SURFACE
FRM_1.Bottom, Panel.Inside
FRM_2.Bottom, Panel.Inside
FRM_3.Bottom, Panel.Inside
FRM_4.Bottom, Panel.Inside
**
** Constraint: TIE_STR@Panel@P
*Tie, name=TIE_STR@Panel@P, adjust=yes, type=SURFACE TO SURFACE
STR_1.Bottom, Panel_To_STR&Tie
STR_2.Bottom, Panel_To_STR&Tie
STR_3.Bottom, Panel_To_STR&Tie
STR_4.Bottom, Panel_To_STR&Tie
STR_5.Bottom, Panel_To_STR&Tie
STR_6.Bottom, Panel_To_STR&Tie
*End Assembly
**
** ELEMENT CONTROLS
**
*Section Controls, name=EC-1, hourglass=ENHANCED
1., 1., 1.
**
** MATERIALS
*Material, name=Composite-material
*Density
 1.58e-09,
***Elastic, type=ENGINEERING CONSTANTS
**100000., 6000, 6000,    0.35,    0.35,    0.35, 3000, 3000
** 3000,
*Include, input=composite_material_1.inp
**
** BOUNDARY CONDITIONS
**
** Name: BC-1 Type: Displacement/Rotation
*Boundary
s_Set-1, 1, 1
s_Set-1, 2, 2
s_Set-1, 3, 3
s_Set-1, 4, 4
s_Set-1, 5, 5
** Name: BC-2 Type: Displacement/Rotation
*Boundary
s_Set-3, 1, 1
s_Set-3, 3, 3
s_Set-3, 4, 4
s_Set-3, 5, 5
** Name: BC-3 Type: Displacement/Rotation
*Boundary
Set-7, 3, 3
Set-7, 4, 4
Set-7, 5, 5
** Name: BC-4 Type: Displacement/Rotation
*Boundary
Set-8, 3, 3
Set-8, 4, 4
Set-8, 5, 5
** ----------------------------------------------------------------
**
** STEP: LoadStep
**
*STEP
*BUCKLE, EIGENSOLVER=SUBSPACE
 30,,,500
**Data line to request the desired number of symmetric modes
** LOADS
**
** Name: Load   Type: Rotation
*BOUNDARY
s_Set-1, 6, 6, 1.0
s_Set-3, 6, 6, -1.0
**
***Output, field
***Element Output, position = integration points
**IVOL
**
*MODAL FILE
*END STEP
**
